<neuroml xmlns="http://www.neuroml.org/schema/neuroml2"  xmlns:xs="http://www.w3.org/2001/XMLSchema" xmlns:xsi="http://www.w3.org/2001/XMLSchema-instance" xsi:schemaLocation="http://www.neuroml.org/schema/neuroml2 https://raw.github.com/NeuroML/NeuroML2/development/Schemas/NeuroML2/NeuroML_v2beta4.xsd" id="Solinas2010">
    <include href="Granule_98.cell.nml"></include>
    <include href="Golgi_98.cell.nml"></include>
    <include href="AMPA_GranGol.synapse.nml"></include>
    <include href="GABAA.synapse.nml"></include>
    <network id="Solinas2010" type="networkWithTemperature" temperature="32.0 degC">
        <notes>Network generated using libNeuroML v0.2.6</notes>
        <population id="Grans" component="Granule_98" type="populationList" size="1600">
            <instance id="0">
                <location y="-25.102900000000002" x="-44.200400000000002" z="-26.349"/>
            </instance>
            <instance id="1">
                <location y="-24.6036" x="-38.589399999999998" z="-26.1707"/>
            </instance>
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        </population>
        <population id="Golgis" component="Golgi_98" type="populationList" size="18">
            <instance id="0">
                <location y="0." x="-12.664300000000001" z="0."/>
            </instance>
            <instance id="1">
                <location y="0." x="18.396000000000001" z="0."/>
            </instance>
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        </population>
        <projection id="NetConn_Grans_Golgis" postsynapticPopulation="Golgis" presynapticPopulation="Grans" synapse="AMPA_GranGol">
            <connection id="0" preFractionAlong="0.5" preCellId="../Grans/0/Granule_98" postFractionAlong="0.5" postSegmentId="0" postCellId="../Golgis/3/Golgi_98" preSegmentId="0"/>
            <connection id="1" preFractionAlong="0.5" preCellId="../Grans/0/Granule_98" postFractionAlong="0.5" postSegmentId="0" postCellId="../Golgis/5/Golgi_98" preSegmentId="0"/>
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        </projection>
        <projection id="NetConn_Golgis_Grans" postsynapticPopulation="Grans" presynapticPopulation="Golgis" synapse="GABAA">
            <connection id="0" preFractionAlong="0.5" preCellId="../Golgis/0/Golgi_98" postFractionAlong="0.5" postSegmentId="0" postCellId="../Grans/533/Granule_98" preSegmentId="0"/>
            <connection id="1" preFractionAlong="0.5" preCellId="../Golgis/0/Golgi_98" postFractionAlong="0.5" postSegmentId="0" postCellId="../Grans/693/Granule_98" preSegmentId="0"/>
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        </projection>
    </network>
</neuroml>
